h1 := 1*10^-3  # глубина залегания неоднородности
ρ1 := 774*10^-2  # Ом*м  # удельное сопротивление среды в которой находится неоднородность
r1 := 3*10^-3  # радиус неоднородности
ρ2 := 100*10^-2  # Ом*м  # удельное сопротивленние неоднородности
a0 := 30*10^-3  # половина расстояния между токовыми электродами
x0 := 0*10^-2  # смещение сферы перпендикулярно оси сборки
bl0 := 15*10^-3  # половина расстояния между потенциальными электродами (слева)
y0 := 0*10^-3  # смещение сферы вдоль оси сборки
br0 := 15*10^-3  # половина расстояния между потенциальными электродами (справа)
# [area: Рассчетные соотношения]
N := 100
r_0A(r_1, h_1, a, x, y) := sqrt((r_1 + h_1)^2 + (a - y)^2 + x^2)
r_M(r_1, h_1, b, x, y) := sqrt((r_1 + h_1)^2 + (b - y)^2 + x^2)
r_0B(r_1, h_1, a, x, y) := sqrt((r_1 + h_1)^2 + (a + y)^2 + x^2)
r_N(r_1, h_1, b, x, y) := sqrt((r_1 + h_1)^2 + (b + y)^2 + x^2)
cosθ_AM(r_1, h_1, a, b, x, y) := (r_0A(r_1, h_1, a, x, y)^2 + r_M(r_1, h_1, b, x, y)^2 - (a - b)^2)/(2*r_0A(r_1, h_1, a, x, y)*r_M(r_1, h_1, b, x, y))
cosθ_AN(r_1, h_1, a, b, x, y) := (r_0A(r_1, h_1, a, x, y)^2 + r_N(r_1, h_1, b, x, y)^2 - (a + b)^2)/(2*r_0A(r_1, h_1, a, x, y)*r_N(r_1, h_1, b, x, y))
cosθ_BM(r_1, h_1, a, b, x, y) := (r_0B(r_1, h_1, a, x, y)^2 + r_M(r_1, h_1, b, x, y)^2 - (a + b)^2)/(2*r_0B(r_1, h_1, a, x, y)*r_M(r_1, h_1, b, x, y))
cosθ_BN(r_1, h_1, a, b, x, y) := (r_0B(r_1, h_1, a, x, y)^2 + r_N(r_1, h_1, b, x, y)^2 - (a - b)^2)/(2*r_0B(r_1, h_1, a, x, y)*r_N(r_1, h_1, b, x, y))
dZ_AM(ρ_1, ρ_2, a, b, r_1, h_1, x, y) := ρ_1/(π*r_0A(r_1, h_1, a, x, y))*sum((r_1/r_M(r_1, h_1, b, x, y))^(n + 1)*(r_1/r_0A(r_1, h_1, a, x, y))^n*(n*ρ_2 - n*ρ_1)/((n + 1)*ρ_2 + n*ρ_1)*Leg(n, cosθ_AM(r_1, h_1, a, b, x, y)), n = 0 .. N)
dZ_AN(ρ_1, ρ_2, a, b, r_1, h_1, x, y) := ρ_1/(π*r_0A(r_1, h_1, a, x, y))*sum((r_1/r_N(r_1, h_1, b, x, y))^(n + 1)*(r_1/r_0A(r_1, h_1, a, x, y))^n*(n*ρ_2 - n*ρ_1)/((n + 1)*ρ_2 + n*ρ_1)*Leg(n, cosθ_AN(r_1, h_1, a, b, x, y)), n = 0 .. N)
dZ_BM(ρ_1, ρ_2, a, b, r_1, h_1, x, y) := ρ_1/(π*r_0B(r_1, h_1, a, x, y))*sum((r_1/r_M(r_1, h_1, b, x, y))^(n + 1)*(r_1/r_0B(r_1, h_1, a, x, y))^n*(n*ρ_2 - n*ρ_1)/((n + 1)*ρ_2 + n*ρ_1)*Leg(n, cosθ_BM(r_1, h_1, a, b, x, y)), n = 0 .. N)
dZ_BN(ρ_1, ρ_2, a, b, r_1, h_1, x, y) := ρ_1/(π*r_0B(r_1, h_1, a, x, y))*sum((r_1/r_N(r_1, h_1, b, x, y))^(n + 1)*(r_1/r_0B(r_1, h_1, a, x, y))^n*(n*ρ_2 - n*ρ_1)/((n + 1)*ρ_2 + n*ρ_1)*Leg(n, cosθ_BN(r_1, h_1, a, b, x, y)), n = 0 .. N)
dZ(ρ_1, ρ_2, a, bl, br, r_1, h_1, x, y) := dZ_AM(ρ_1, ρ_2, a, bl, r_1, h_1, x, y) - dZ_AN(ρ_1, ρ_2, a, br, r_1, h_1, x, y) + dZ_BN(ρ_1, ρ_2, a, br, r_1, h_1, x, y) - dZ_BM(ρ_1, ρ_2, a, bl, r_1, h_1, x, y)
Zbase(ρ_1, ρ_2, a, bl, br, r_1, h_1, x, y)
Zbase(ρ_1, ρ_2, a, bl, br, r_1, h_1, x, y) := ρ_1*2*bl/(π*(a^2 - bl^2)) + dZ(ρ_1, ρ_2, a, bl, br, r_1, h_1, x, y)
Zbases(ρ_1, ρ_2, a, b, r_1, h_1, x, y) := ρ_1*2*b/(π*(a^2 - b^2)) + dZ(ρ_1, ρ_2, a, b, b, r_1, h_1, x, y)
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ro1Base1(h, rad, zbase, a, b) :=
    dro ← 0.2
    for i ∈ -10 .. 10
        zb1 ← Zbase(5 + dro*i, 1.35, a, b, b, rad, h, 0, 0)
        zb2 ← Zbase(5 + dro*(i + 1), 1.35, a, b, b, rad, h, 0, 0)
        ro ← 5 + i*dro if ((zb2 > zbase) and (zb1 < zbase))
    return ro
ro1BaseAC(h, rad, zbase, a, b) :=
    dro ← 0.1
    for i ∈ -20 .. 20
        zb1 ← Zbase(5 + dro*i, 1.35, a, b, b, rad, h, 0, 0)
        zb2 ← Zbase(5 + dro*(i + 1), 1.35, a, b, b, rad, h, 0, 0)
        ro ← 5 + i*dro if ((zb2 > zbase) and (zb1 < zbase))
    return ro
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ro1BaseAC(h, rad, zbase, a, b, y) :=
    dro ← 0.1
    for i ∈ -40 .. 60
        zb1 ← Zbase(5 + dro*i, 1.35, a, b, b, rad, h, 0, y)
        zb2 ← Zbase(5 + dro*(i + 1), 1.35, a, b, b, rad, h, 0, y)
        ro ← 5 + i*dro if ((zb2 > zbase) and (zb1 < zbase))
    return ro
droFL(dz) := dz*π*(0.05^2 - 0.025^3)/(2*0.025)
droFL(dz)
dR(dZ, dRo, ρ_1, h, rad, a, b, y) :=
    dr ← 0.0001
    for i ∈ 0 .. 150
        zb1 ← Zbase(ρ_1, 1.35, a, b, b, rad, h, 0, y) - Zbase(ρ_1 - dRo, 1.35, a, b, b, rad - dr*i, h, 0, y)
        zb2 ← Zbase(ρ_1, 1.35, a, b, b, rad, h, 0, y) - Zbase(ρ_1 - dRo, 1.35, a, b, b, rad - dr*(i + 1), h, 0, y)
        dRR ← i*dr if ((zb1 > dZ) and (zb2 < dZ))
    return dRR
dR_Xch(dZ, dRo, dy, h, rad, zbase, a, b, y) := dR(-dZ, dRo, ro1BaseAC(h, rad, zbase, a, b, y + dy), h, rad, a, b, y + dy)
